# Log-logistic dose-response
y == C + (D - C)/(1 + (z/ED50)^B)
# Solve for B
B == ln(-(D - y)/(C - y))/ln(z/ED50)
# Solve for two points on curve
y1 == C + (D - C)/(1 + (z1/ED50)^B)
B == ln(-(D - y2)/(C - y2))/ln(z2/ED50)
