a := 7.4
c := 77.9
b := 0.0085
m := 624
a + c/(1 + exp(-b*(pt - m)))
height(pt) := a + c/(1 + exp(-b*(pt - m)))
hmin == a + c/2
hmin - c/2
pt := 0 .. 1000
hmax == a + c
hmin := a + c/(1 + exp(b*m))
hmax := a + c
height2(pt) := 2*hmin + 2*(hmax - hmin)/(1 + exp(-b*pt)) - hmax
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hmin = 7.78538
height(0) = 7.78538
height(10000) = 85.3
hmax = 85.3
