scv := 0.2
LAI := 1
sinb := 0.11
I_diff := 300
k_diff := 0.7
I_dir := 10
refHorz := (1 - sqrt(1 - scv))/(1 + sqrt(1 - scv))
refHorz = 0.0557281
x := 0.04, 0.045 .. 0.11
refSphec(sinb) := refHorz*2/(1 + 1.6*sinb)
refSphec(sinb) = 0.0947757
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k_dirdir := 0.5*k_diff/(0.8*sqrt(1 - scv)*sinb)
k_dirdir = 4.44673
k_dir := k_dirdir*sqrt(1 - scv)
k_dir = 3.97727
A_diff := k_diff*(1 - refHorz)*exp(-k_diff*LAI)*I_diff
A_diff = 98.4714
A_dir := k_dir*(1 - refSphec(sinb))*exp(-k_dir*LAI)*I_dir
A_dir = 0.674581
A_dirdir := k_dirdir*(1 - scv)*exp(-k_dirdir*LAI)*I_dir
A_dirdir = 0.416813
A_total := A_diff + A_dir - A_dirdir
A_total = 98.7292
# sinb = 0.04
# refSphec = 0.105
# kdir = 10.94
# sinb = 0.11
# refSphec = 0.095
# kdir = 3.98
